*HEADING
cubit(as/Dropbox/research-uday-csi/DUC/Inverse Solver/cyl_2.inp): 12/20/2015: 06
version: 13.0
**
********************************** P A R T S **********************************
*PART, NAME=Part-Default
**
********************************** N O D E S **********************************
*NODE, NSET=ALLNODES
       1,    2.500000e-01,    0.000000e+00,    5.000000e-01
       2,    2.448825e-01,    5.032463e-02,    5.000000e-01
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**
********************************** E L E M E N T S ****************************
*ELEMENT, TYPE=STRI3, ELSET=EB1
       1,      61,      76,      60
       2,       2,       3,      32
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**
********************************** S I D E S E T S **********************************
*ELSET, ELSET=RBC_E1
   11858,   11876,   11888,   11922,   11935,   12017
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*ELSET, ELSET=RBC_E3
   11685,   11740,   11863,   12005,   12110,   12188
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*SURFACE, NAME=RBC
RBC_E1, E1
RBC_E3, E3
*ELSET, ELSET=OUT_E1
    6944,    7032,    7070,    7086,    7108,    7124
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*ELSET, ELSET=OUT_E2
    6923,   11686,   11787,   11799,   11852,   11864
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*ELSET, ELSET=OUT_E3
    6924,    6925,    7023,    7329,    7334,    7335
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*SURFACE, NAME=OUT
OUT_E1, E1
OUT_E2, E2
OUT_E3, E3
*ELSET, ELSET=TOP_E1
     162,     163,     164,     166,     190,     196
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*ELSET, ELSET=TOP_E2
     358,    6930,    6940,    6998,    6999,    7001
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*ELSET, ELSET=TOP_E3
     197,     418,     425,     443,     445,     447
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*SURFACE, NAME=TOP
TOP_E1, E1
TOP_E2, E2
TOP_E3, E3
*ELSET, ELSET=DIE_E1
       2,       3,       4,       6,       7,       9
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*ELSET, ELSET=DIE_E2
      78,     161,     171,     186,     189,     210
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*ELSET, ELSET=DIE_E3
      43,      51,      57,      74,     355
*SURFACE, NAME=DIE
DIE_E1, E1
DIE_E2, E2
DIE_E3, E3
*ELSET, ELSET=AAB_SPOS
     160,     161,     162,     163,     164,     165
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*SURFACE, NAME=AAB
AAB_SPOS, SPOS
*ELSET, ELSET=T01_SPOS
       1,       2,       3,       4,       5,       6
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*SURFACE, NAME=T01
T01_SPOS, SPOS
**
********************************** P R O P E R T I E S ************************
*SHELL SECTION, ELSET=EB1, SECTION INTEGRATION=SIMPSON, MATERIAL=Default-Steel
1.000000e+00
**
*END PART
**
**
**
********************************** E N D   P A R T S **********************************
**
**
********************************** A S S E M B L Y ************************************
**
*ASSEMBLY, NAME=ASSEMBLY1
**
*INSTANCE, NAME=Part-Default_1, PART=Part-Default
*END INSTANCE
**
*END ASSEMBLY
**
**
**
*MATERIAL, NAME = Default-Steel
*ELASTIC, TYPE=ISOTROPIC
2.068000e+05, 2.900000e-01
*DENSITY
7.000000e-06
*CONDUCTIVITY,TYPE=ISO
4.500000e-02
*SPECIFIC HEAT
5.000000e+02
**
**
************************************** H I S T O R Y *************************************
**
*PREPRINT
**
**************************************** S T E P 1 ***************************************
*STEP,INC=100,NAME=Default Set
**
*STATIC
1, 1, 1e-05, 1
**
**
**
**
*END STEP
